// COMSOL Multiphysics 5.3.1.229 model "Longboard.mph"
// Outline of the model tree

Parameters
  length = 70[cm]  // Total length
  Ftotal = 1000[N]  // Force on the longboard
  width = 22[cm]  // bredd
  height = 1.3[cm]  // tjocklek

Geometry
  geom1 "Geometry 1" (3D, length unit m)
    blk1: Block | size = {width, length, height}
    blk2: Block | pos = {0.05, -0.14, 0}; size = {0.12, 0.14, height}
    blk3: Block | pos = {0.05, length, 0}; size = {0.12, 0.14, height}
    blk4: Block "Truckar1" | pos = {0.11, -0.07, -0.05}; base = center; size = {0.05, 0.07, 0.10}
    blk5: Block "Truckar2" | pos = {0.11, 0.77, -0.05}; base = center; size = {0.05, 0.07, 0.10}
    cyl1: Cylinder | pos = {0.11, 0.35, height}; r = 0.05; h = 0.01
    fin: Finalize "Form Union"

Materials
  mat1: Common "9 ply laminate [solid,90 degree outer ply]" on domains 1-3
    def "Basic"
      youngsmodulus = 12.4e9
      poissonsratio = 0.26
      density = 615
    KG "Bulk modulus and shear modulus"
      K = 0.3e9
      G = 0.62e9
      mu_solid_90_degree_outer_ply_1: Piecewise | arg = T; pieces = {173.0, 373.0, 1.839529E9+1295320.0*T^1-9221.548*T^2}
  mat2: Common "Steel AISI 4340" on domains 5, 6
    def "Basic"
      relpermeability = 1
      electricconductivity = 4.032e6[S/m]
      thermalexpansioncoefficient = 12.3e-6[1/K]
      heatcapacity = 475[J/(kg*K)]
      relpermittivity = 1
      density = 7850[kg/m^3]
      thermalconductivity = 44.5[W/(m*K)]
    Enu "Young's modulus and Poisson's ratio"
      youngsmodulus = 205e9[Pa]
      poissonsratio = 0.28
  mat3: Common "Iron" on domains 4
    def "Basic"
      relpermeability = 4000
      electricconductivity = 1.12e7[S/m]
      thermalexpansioncoefficient = 12.2e-6[1/K]
      heatcapacity = 440[J/(kg*K)]
      relpermittivity = 1
      density = 7870[kg/m^3]
      thermalconductivity = 76.2[W/(m*K)]
    Enu "Young's modulus and Poisson's ratio"
      youngsmodulus = 200e9[Pa]
      poissonsratio = 0.29

Physics
  solid: SolidMechanics on all domains
    dependent variable u = {u, v, w}
    lemm1: LinearElasticModel "Linear Elastic Material 1" (default)
    free1: Free (default)
    init1: init "Initial Values 1" (default)
    fix1: Fixed "Fixed Constraint 1" on boundaries 22, 27
    bndl1: BoundaryLoad "Person" on boundaries 19 | LoadType = TotalForce; Ftot = {0, 0, -Ftotal}

Mesh
  mesh1 "Mesh 1"
    size: MeshSizeDefault | hmax = 0.098; hmin = 0.0176; hcurve = 0.6; hnarrow = 0.5; hgrad = 1.5
    ftet1: FreeTet "Free Tetrahedral 1" on domains 1-6

Studies
  std1 "Study 1"
    stat: Stationary

Solver configurations
  sol1 "Solution 1" (study std1)
    v1: Variables "Dependent Variables 1"
    s1: Stationary "Stationary Solver 1"
      fc1: FullyCoupled | linsolver = d1
      d1: Direct "Suggested Direct Solver (solid)"

Datasets
  dset1: Solution | solution = sol1

Plots
  pg1: PlotGroup3D "Stress (solid)" | data = dset1
    surf1: Surface | expr = solid.mises
      def: Deform "Deformation" | expr = {u, v, w}; descr = Displacement field